// SBML level 2 version 1

model Tyson1991CellModel_2()
  // Tyson1991_CellCycle_2var
  // Cell Cycle Model; Tyson (1991, 2 variables)
  // Description
  // This is a two variable reduction of the larger 6-variable model published in the same paper.The published equations are:
  // u'=k4(v-u)(alpha+u^2)-k6*u
  // v'=Kappa-k6*u
  // In the present implementation, the change of variables z=v-u is made, so that the system becomes the more symmetric system :
  // u'=k4*z*(alpha+u^2)-k6*u
  // z'=Kappa-z*(alpha+u^2)
  // The variables can be interpreted as follows:
  // u=[activeMPF]/[CT]
  // v=([cyclin]+[preMPF]+[activeMPF])/[CT]
  // z=([cyclin]+[preMPF])/[CT], where [CT]=[CDC2]+{CDC2P]+[preMPF]+[aMPF]
  // Rate constant Reaction
  // k4*(k4prime/k4 + u[t]^2) z -> u
  // k6 = 1 u -> EmptySet
  // kappa = 0.015 EmptySet -> z
  // Variable IC ODE
  // u 0 u'[t] == -(k6*u[t]) + k4*(k4prime/k4 + u[t]^2)*z[t]
  // z 0 z'[t] == kappa - k4*(k4prime/k4 + u[t]^2)*z[t]
  // Generated by Cellerator Version 1.0 update 2.1127 using Mathematica 4.2 for Mac OS X (June 4, 2002), November 27, 2002 13:36:48, using (PowerMac,PowerPC, Mac OS X,MacOSX,Darwin)
  // author=B.E.Shapiro
  // Nicolas Le Novere: Updated version with comparment size to 1 on August 20 2006. Checked on COPASI 4.0 build 8.
  // This model originates from BioModels Database: A Database of Annotated Published Models. It is copyright (c) 2005-2009 The BioModels Team.
  // For more information see the terms of use.
  // To cite BioModels Database, please use Le Novère N., Bornstein B., Broicher A., Courtot M., Donizelli M., Dharuri H., Li L., Sauro H., Schilstra M., Shapiro B., Snoep J.L., Hucka M. (2006) BioModels Database: A Free, Centralized Database of Curated, Published, Quantitative Kinetic Models of Biochemical and Cellular Systems Nucleic Acids Res., 34: D689-D691.
  // biomodels.db:BIOMD0000000006
  // isDescribedBy pubmed:1831270
  // hasVersion reactome:REACT_152
  // kegg.pathway:sce04111
  // isVersionOf GO:0000278
  // taxonomy:33154

  // Compartments:
  compartment cell = 1;  // GO:0005623

  // Species:
  substanceOnly species $EmptySet in cell = 1;
  substanceOnly species u in cell = 0;
  substanceOnly species z in cell = 0;

  // Reactions:
  Reaction1: $EmptySet => z; kappa;
    kappa = 0.015;
  Reaction2: u => $EmptySet; k6*u;
    k6 = 1;
  Reaction3: z => u; k4*z*(k4prime/k4 + u^2);
    k4 = 180; k4prime = 0.018;
end
